# Transport, chemical tanker; residual fuel oil powered; Pacific of Central/South America to US West Coast

Dataset: openLCA process, unit process
Category: 48-49: Transportation and Warehousing / 4831: Deep Sea, Coastal, and Great Lakes Water Transportation
Time period: 2023-01-01 to 2023-12-31
Allocation method: physical allocation
Data quality: US EPA - Process Pedigree Matrix (5;1)
Exchange data quality scheme: US EPA - Flow Pedigree Matrix
Generated by: ERG
Published in: ERG (2025) Marine Transport v1.0
restrictionsDescription: These U.S. LCI Database Project data ("Data") are provided by the National Renewable Energy Laboratory ("NREL"), operated by the Alliance for Sustainable Energy, LLC ("Alliance") for the US Department of Energy ("DOE") under Contract No. DE-AC36-08GO28308. The United States Government (the "Government") retains and the user acknowledges that the Government retains a non-exclusive, paid-up, irrevocable, worldwide license to publish or reproduce the published form of these data, or allow others to do so, for Government purposes.
Access to and use of these Data shall impose the following obligations on the user, as set forth in this Agreement. The user is granted the right, without any fee or cost, to use, copy, modify, alter, enhance and distribute these Data for any purpose whatsoever, provided that this entire notice appears in all copies of the Data. Any modification, alteration or enhancement of these data shall be identified and documented by the user. Further, the user agrees to credit the DOE/NREL/Alliance in any publication that results from the use of these Data. The names DOE/NREL/Alliance, however, may not be used in any advertising or publicity to endorse or promote any products or commercial entities unless specific written permission is obtained from DOE/NREL/Alliance. The user also understands that DOE/NREL/Alliance is not obligated to provide the user with any support, consulting, training or assistance of any kind with regard to the use of these Data or to provide the user with any updates, revisions or new versions of these Data.
YOU AGREE TO INDEMNIFY THE GOVERNMENT AND DOE/NREL/ALLIANCE, AND ITS SUBSIDIARIES, AFFILIATES, OFFICERS, AGENTS, AND EMPLOYEES AGAINST ANY CLAIM OR DEMAND, INCLUDING REASONABLE ATTORNEYS' FEES, RELATED TO YOUR USE OF THESE DATA. THESE DATA ARE PROVIDED BY DOE/NREL/ALLIANCE "AS IS" AND ANY EXPRESS OR IMPLIED WARRANTIES, INCLUDING BUT NOT LIMITED TO, THE IMPLIED WARRANTIES OF MERCHANTABILITY AND FITNESS FOR A PARTICULAR PURPOSE ARE DISCLAIMED. IN NO EVENT SHALL THE GOVERNMENT OR DOE/NREL/ALLIANCE BE LIABLE FOR ANY SPECIAL, INDIRECT OR CONSEQUENTIAL DAMAGES OR ANY DAMAGES WHATSOEVER, INCLUDING BUT NOT LIMITED TO CLAIMS ASSOCIATED WITH THE LOSS OF DATA OR PROFITS, WHICH MAY RESULT FROM AN ACTION IN CONTRACT, NEGLIGENCE OR OTHER TORTIOUS CLAIM THAT ARISES OUT OF OR IN CONNECTION WITH THE ACCESS, USE OR PERFORMANCE OF THESE DATA.

## General comment
This dataset represents the movement of goods via a Chemical Tanker using Residual fuel oil as a fuel source. The reference flow is the movement of a unit of mass of goods (e.g., 1 kg) across a distance (e.g., 1 km). Emissions account for vessel activity during transit, maneuvering, hotelling, and anchorage.

## Technology
Chemical Tankers are liquid-cargo vessels that transport chemicals in bulk.
This type is modeled as Handymax with a capacity of 48000.0 metric tons and an assumed utilization of 98.0%. Vessel characteristics are sourced from EPA Ports Emissions Inventory Guidance, Appendix C (USEPA 2022).

## Geography
This process assumes an average emissions rate based on a route from Pacific of Central/South America to US West Coast. The route is also used to estimate the portion of emissions that occur within an Emissions Control Area (ECA), where reduced emissions are required. Note no location object is assigned as emissions are primarily occuring in open waters.

## Time period
This process reflects the marine fleet as estimated in 2023 based on vessel Entrance and Clearance data for U.S. ports for that year.

## Reference product
- Transport, chemical tanker; residual fuel oil powered: 1 t*km

## Inputs
- Residual fuel oil, at refinery: 0.001225 kg; data quality (5,5,5,5,5)

## Outputs
All rows: data quality (5,5,5,5,5)
- 1,3-Butadiene: 3.295e-10, 3.302e-9 kg (2 entries)
- 2,2,4-Trimethylpentane: 2.316e-9, 2.321e-8 kg (2 entries)
- Acenaphthene: 1.656e-11, 1.659e-10 kg (2 entries)
- Acenaphthylene: 3.838e-11, 3.846e-10 kg (2 entries)
- Acetaldehyde: 3.182e-9, 3.189e-8 kg (2 entries)
- Acrolein: 6.011e-10, 6.023e-9 kg (2 entries)
- Ammonia: 1.873e-8, 1.322e-7 kg (2 entries)
- Anthracene: 1.119e-10, 1.121e-9 kg (2 entries)
- Antimony: 5.984e-10, 4.225e-9 kg (2 entries)
- Arsenic: 2.52e-11, 1.779e-10 kg (2 entries)
- Benz[a]anthracene: 8.582e-12, 6.059e-11 kg (2 entries)
- Benzene: 1.541e-9, 1.545e-8 kg (2 entries)
- Benzo[a]pyrene: 4.067e-12, 2.872e-11 kg (2 entries)
- Benzo[k]fluoranthene: 4.067e-12, 2.872e-11 kg (2 entries)
- Cadmium: 2.296e-10, 1.621e-9 kg (2 entries)
- Carbon dioxide: 0.0004573, 0.003229 kg (2 entries)
- Carbon monoxide: 7.94e-7, 7.3e-6 kg (2 entries)
- Chrysene: 1.586e-11, 1.12e-10 kg (2 entries)
- Fluoranthene: 8.728e-11, 6.162e-10 kg (2 entries)
- Fluorene: 5.334e-11, 5.345e-10 kg (2 entries)
- Formaldehyde: 1.389e-8, 1.392e-7 kg (2 entries)
- Hexane: 9.075e-10, 9.094e-9 kg (2 entries)
- Lead: 1.216e-10, 8.587e-10 kg (2 entries)
- Manganese: 3.133e-12, 2.212e-11 kg (2 entries)
- Mercury: 4.067e-14, 2.872e-13 kg (2 entries)
- Methane: 6.179e-9, 6.189e-8 kg (2 entries)
- Naphthalene: 1.018e-8, 1.02e-7 kg (2 entries)
- Nickel: 6.684e-10, 4.719e-9 kg (2 entries)
- Nitrogen oxides: 1.084e-5, 7.657e-5 kg (2 entries)
- Nitrous oxide: 2.835e-8, 1.648e-7 kg (2 entries)
- Particulate matter, ≤ 10μm: 3.553e-7 kg
  ECA
- Particulate matter, ≤ 10μm: 1.211e-7, 3.86e-6 kg (2 entries)
  nonECA
- Particulate matter, ≤ 2.5μm: 3.447e-7 kg
  ECA
- Particulate matter, ≤ 2.5μm: 1.174e-7, 3.743e-6 kg (2 entries)
  nonECA
- Phenanthrene: 4.41e-10, 4.42e-9 kg (2 entries)
- Polychlorinated biphenyls: 4.067e-13, 2.872e-12 kg (2 entries)
- Propionaldehyde: 4.934e-10, 4.945e-9 kg (2 entries)
- Pyrene: 3.279e-11, 2.315e-10 kg (2 entries)
- Selenium: 4.262e-14, 3.009e-13 kg (2 entries)
- Sulfur dioxide: 3.441e-7 kg
  ECA
- Sulfur dioxide: 4.893e-7, 1.559e-5 kg (2 entries)
  nonECA
- Toluene: 6.619e-10, 6.633e-9 kg (2 entries)
- Volatile organic compounds: 3.253e-7, 3.259e-6 kg (2 entries)
- o-Xylene: 1.669e-10, 1.672e-9 kg (2 entries)

## Inventory method
Attributional process.

## Modelling constants
Engine kW ratings for propulsion, auxiliary and boilers were obtained from the EPA Ports Emisisons Inventory Guidance (USEPA 2022). For the auxiliary and boilers, the kW already took into account the load factor. For the propulsion a load factor was calculated using the well-known Propeller Law (see Equation 3.6 in USEPA 2022). The Propeller Law takes into account the sea margin, which is an efficiency factor of between 1.1 and 1.15 for weather conditions. However, at lower speeds, where the load is 20% or less, emissions are increased due to inefficiencies. These factors were also obtained from EPA (USEPA 2022). For these calculations we used the adjustment for load factors <=2%.

## Completeness
HAP speciation profiles from (see USEPA 2022 Appendix D) are applied to VOC and PM emission factors.

## Data selection
''

## Data treatment
Regional distances were calculated using averages distances for the routes using shipping lanes between the more visited ports based on the Entrance and Clearance data for 2023 (USACE 2023). The shipping lanes were from the Global Shipping Routes from ArcGIS which were originally generated from shipping lane vectors from the Map of the World Oceans. This analysis provided the typical transit distance and percentages in ECA zones.
The average vessel speeds for the typical vessels are used to calculate the transit time by dividing the distance by speed. The average speed is calculated based on the mode of transit speed ratios multiplied by the max speed (USEPA 2022).
The time for the port, maneuvering, and anchorage times also need to be estimated. The international port times were derived from data from median time spent in port by container ships worldwide in 2021, by country. The US dwell times were based on a US average from 2022 of 34.6 hours for container ships and 41 hours for tankers (BTS 2023).
Maneuvering time was estimated based on the distance a ship travels from the breakwater to the pier/wharf/dock (PWD). Average maneuvering speeds range between 3 to 8 knots. Outbound speeds are usually faster since the ship does not need to dock (Browning 2006). Because of this we assumed a speed of 3 inbound and 5.5 for the outbound speed. The distance was measured from the innermost point of the port to the coastline plus 0.5 miles for the breakwater. These distances were averaged by the US region and global regions.
The anchorage time was assumed to be 6.5% of the total transit time. This is based on averaging the average percentage time of anchorage from AIS tracking, which ranges from 4% to 9%.

## Data collection
Data were modeled in 2025.

## Sampling procedure
Representative routes from various global regions were selected based on the most frequent vessel activity.

## Use advice
Select routes are provided from various global regions to the United States. The choice of route primarily impacts the share of the emissions that occur during transit relative to near-shore emissions during maneuvering, hotelling, and anchorage. These processes are generally applicable to outgoing transit as well. This process is intended to connect to fuel supply processes in the USLCI.

## Intended application
Situation C1 - Accounting, with system-external interactions - The intended application is a purely descriptive accounting / documentation of the analyzed system including existing interactions with other systems in the LCI model. The target audience of this model includes LCA practitioners, industry, and the general public. A full inventory of environmental flows are included; thus this unit process can be used for a full range of LCIA impact categories.

## Project
This dataset was developed by the Federal LCA Commons Data Curator Eastern Research Group, Inc. (ERG) under subcontract (SUB-2024-10066) to the National Renewable Energy Laboratory under Department of Energy (DOE) Prime Contract No. DE-AC36-08GO28308. The work is funded by DOE's Advanced Materials & Manufacturing Technologies Office (AMMTO).

## Review Dependent internal review
ERG internally reviewed the underlying assumptions and operations to generate the datasets and the metadata.

## Sources
- USEPA (2022) Port Emissions Inventory Guidance
- Browning (2006)
- USACE (2023) Vessel Entrances and Clearances
- BTS (2023) Container Dwell Times
- BTS (2023) Tanker Dwell Times
